*Heading
** Job name: Job-1 Model name: grenland_bridge_2
** Generated by: Abaqus/CAE 2022
*Preprint, echo=NO, model=NO, history=NO, contact=NO
**
** PARTS
**
*Part, name=BRIDGE_1
*Node
      1,           0.,           0.,          51.
      2,           1.,           0.,          51.
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*Element, type=B31
   1,    1,    2
   2,    2,    3
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*Nset, nset=BRIDGE_DECK_NODES, generate
   1,  359,    1
*Nset, nset=MAIN_TOWER_WEST, generate
 610,  774,    1
*Nset, nset=MAIN_TOWER_EAST, generate
 775,  939,    1
*Nset, nset=MAIN_TOWER_LOWER_COUPLING, generate
 940,  953,    1
*Nset, nset=MAIN_TOWER_MID_COUPLING, generate
 954,  966,    1
*Nset, nset=MAIN_TOWER_UPPER_COUPLING, generate
 967,  977,    1
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*Elset, elset=BRIDGE_DECK_ELEMENTS, generate
   1,  358,    1
*Elset, elset=MAIN_TOWER_WEST_ELEMENTS, generate
 609,  772,    1
*Elset, elset=MAIN_TOWER_EAST_ELEMENTS, generate
 773,  936,    1
*Elset, elset=MAIN_TOWER_LOWER_COUPLING_ELEMENTS, generate
 937,  952,    1
*Elset, elset=MAIN_TOWER_MID_COUPLING_ELEMENTS, generate
 953,  966,    1
*Elset, elset=MAIN_TOWER_UPPER_COUPLING_ELEMENTS
 967, 968, 969, 971, 972, 973, 974, 975, 976, 977, 978, 979
*Elset, elset=WEST_NORTH_CABLE_ELEMENTS, generate
 1165,  1172,     1
*Elset, elset=WEST_SOUTH_CABLE_ELEMENTS, generate
 1173,  1185,     1
*Elset, elset=EAST_NORTH_CABLE_ELEMENTS, generate
 1186,  1193,     1
*Elset, elset=EAST_SOUTH_CABLE_ELEMENTS, generate
 1194,  1206,     1
*Elset, elset=CABLE_BRIDGE_DECK_ELEMENTS, generate
   1,  358,    1
*Elset, elset=MAIN_TOWER_WEST_BOTTOM_ELEMENTS, generate
 609,  658,    1
*Elset, elset=MAIN_TOWER_WEST_MID_ELEMENTS, generate
 659,  701,    1
*Elset, elset=MAIN_TOWER_WEST_UPPER_ELEMENTS, generate
 702,  738,    1
*Elset, elset=MAIN_TOWER_WEST_TOP_ELEMENTS, generate
 739,  772,    1
*Elset, elset=MAIN_TOWER_EAST_BOTTOM_ELEMENTS, generate
 773,  822,    1
*Elset, elset=MAIN_TOWER_EAST_MID_ELEMENTS, generate
 823,  865,    1
*Elset, elset=MAIN_TOWER_EAST_UPPER_ELEMENTS, generate
 866,  902,    1
*Elset, elset=MAIN_TOWER_EAST_TOP_ELEMENTS, generate
 903,  936,    1
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** Section: Section-1-MAIN_TOWER_WEST_BOTTOM_ELEMENTS  Profile: Profile-1
*Beam Section, elset=MAIN_TOWER_WEST_BOTTOM_ELEMENTS, material=B45, temperature=GRADIENTS, section=BOX
7.129, 2.5, 0.5, 0.5, 0.5, 0.5
1.,0.,0.
** Section: Section-2-MAIN_TOWER_WEST_MID_ELEMENTS  Profile: Profile-2
*Beam Section, elset=MAIN_TOWER_WEST_MID_ELEMENTS, material=B45, temperature=GRADIENTS, section=BOX
5.719, 2.5, 0.5, 0.5, 0.5, 0.5
1.,0.,0.
** Section: Section-3-MAIN_TOWER_WEST_UPPER_ELEMENTS  Profile: Profile-3
*Beam Section, elset=MAIN_TOWER_WEST_UPPER_ELEMENTS, material=B45, temperature=GRADIENTS, section=BOX
4.841, 2.5, 0.5, 0.5, 0.5, 0.5
1.,0.,0.
** Section: Section-4-MAIN_TOWER_WEST_TOP_ELEMENTS  Profile: Profile-4
*Beam Section, elset=MAIN_TOWER_WEST_TOP_ELEMENTS, material=B45, temperature=GRADIENTS, section=BOX
4.5, 2.5, 0.5, 0.5, 0.5, 0.5
1.,0.,0.
** Section: Section-5-MAIN_TOWER_EAST_BOTTOM_ELEMENTS  Profile: Profile-5
*Beam Section, elset=MAIN_TOWER_EAST_BOTTOM_ELEMENTS, material=B45, temperature=GRADIENTS, section=BOX
7.129, 2.5, 0.5, 0.5, 0.5, 0.5
1.,0.,0.
** Section: Section-6-MAIN_TOWER_EAST_MID_ELEMENTS  Profile: Profile-6
*Beam Section, elset=MAIN_TOWER_EAST_MID_ELEMENTS, material=B45, temperature=GRADIENTS, section=BOX
5.719, 2.5, 0.5, 0.5, 0.5, 0.5
1.,0.,0.
** Section: Section-7-MAIN_TOWER_EAST_UPPER_ELEMENTS  Profile: Profile-7
*Beam Section, elset=MAIN_TOWER_EAST_UPPER_ELEMENTS, material=B45, temperature=GRADIENTS, section=BOX
4.841, 2.5, 0.5, 0.5, 0.5, 0.5
1.,0.,0.
** Section: Section-8-MAIN_TOWER_EAST_TOP_ELEMENTS  Profile: Profile-8
*Beam Section, elset=MAIN_TOWER_EAST_TOP_ELEMENTS, material=B45, temperature=GRADIENTS, section=BOX
4.5, 2.5, 0.5, 0.5, 0.5, 0.5
1.,0.,0.
** Section: Section-9-MAIN_TOWER_LOWER_COUPLING_ELEMENTS  Profile: Profile-9
*Beam Section, elset=MAIN_TOWER_LOWER_COUPLING_ELEMENTS, material=B45, temperature=GRADIENTS, section=BOX
5., 4.33, 0.3, 0.6, 0.3, 0.6
0.,0.,-1.
** Section: Section-10-MAIN_TOWER_MID_COUPLING_ELEMENTS  Profile: Profile-10
*Beam Section, elset=MAIN_TOWER_MID_COUPLING_ELEMENTS, material=B45, temperature=GRADIENTS, section=BOX
3.5, 3.22, 0.3, 0.6, 0.3, 0.6
0.,0.,-1.
** Section: Section-11-MAIN_TOWER_UPPER_COUPLING_ELEMENTS  Profile: Profile-11
*Beam Section, elset=MAIN_TOWER_UPPER_COUPLING_ELEMENTS, material=B45, temperature=GRADIENTS, section=BOX
3.5, 2.5, 0.3, 0.6, 0.3, 0.6
0.,0.,-1.
** Section: Section-12-WEST_NORTH_CABLE_ELEMENTS  Profile: Profile-12
*Beam Section, elset=WEST_NORTH_CABLE_ELEMENTS, material=S355, temperature=GRADIENTS, section=CIRC
0.05
0.,0.,-1.
** Section: Section-13-WEST_SOUTH_CABLE_ELEMENTS  Profile: Profile-13
*Beam Section, elset=WEST_SOUTH_CABLE_ELEMENTS, material=S355, temperature=GRADIENTS, section=CIRC
0.05
0.,0.,-1.
** Section: Section-14-EAST_NORTH_CABLE_ELEMENTS  Profile: Profile-14
*Beam Section, elset=EAST_NORTH_CABLE_ELEMENTS, material=S355, temperature=GRADIENTS, section=CIRC
0.05
0.,0.,-1.
** Section: Section-15-EAST_SOUTH_CABLE_ELEMENTS  Profile: Profile-15
*Beam Section, elset=EAST_SOUTH_CABLE_ELEMENTS, material=S355, temperature=GRADIENTS, section=CIRC
0.05
0.,0.,-1.
*End Part
**
*Part, name=BRIDGE_2
*Node
    359,         358.,           0.,          51.
    360,         359.,           0.,          51.
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*Element, type=B31
 359,  359,  360
 360,  360,  361
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*Nset, nset=BRIDGE_DECK_NODES, generate
 359,  609,    1
*Nset, nset=COLUMN_3, generate
  978,  1027,     1
*Nset, nset=COLUMN_4, generate
 1028,  1077,     1
*Nset, nset=COLUMN_5, generate
 1078,  1117,     1
*Nset, nset=COLUMN_6, generate
 1118,  1144,     1
*Nset, nset=COLUMN_7, generate
 1145,  1162,     1
*Elset, elset=BRIDGE_DECK_ELEMENTS, generate
 359,  608,    1
*Elset, elset=COLUMN_3_ELEMENTS, generate
  980,  1029,     1
*Elset, elset=COLUMN_4_ELEMENTS, generate
 1030,  1079,     1
*Elset, elset=COLUMN_5_ELEMENTS, generate
 1080,  1119,     1
*Elset, elset=COLUMN_6_ELEMENTS, generate
 1120,  1146,     1
*Elset, elset=COLUMN_7_ELEMENTS, generate
 1147,  1164,     1
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** Section: Section-16-COLUMN_3_ELEMENTS  Profile: Profile-16
*Beam Section, elset=COLUMN_3_ELEMENTS, material=B45, temperature=GRADIENTS, section=RECT
5.388, 1.8
0.,1.,0.
** Section: Section-17-COLUMN_4_ELEMENTS  Profile: Profile-17
*Beam Section, elset=COLUMN_4_ELEMENTS, material=B45, temperature=GRADIENTS, section=RECT
5.386, 1.8
0.,1.,0.
** Section: Section-18-COLUMN_5_ELEMENTS  Profile: Profile-18
*Beam Section, elset=COLUMN_5_ELEMENTS, material=B45, temperature=GRADIENTS, section=RECT
5.27, 1.5
0.,1.,0.
** Section: Section-19-COLUMN_6_ELEMENTS  Profile: Profile-19
*Beam Section, elset=COLUMN_6_ELEMENTS, material=B45, temperature=GRADIENTS, section=RECT
5.113, 1.3
0.,1.,0.
** Section: Section-20-COLUMN_7_ELEMENTS  Profile: Profile-20
*Beam Section, elset=COLUMN_7_ELEMENTS, material=B45, temperature=GRADIENTS, section=RECT
5.007, 1.3
0.,1.,0.
*End Part
**
**
** ASSEMBLY
**
*Assembly, name=Assembly
**
*Instance, name=BRIDGE_1, part=BRIDGE_1
*End Instance
**
*Instance, name=BRIDGE_2, part=BRIDGE_2
*End Instance
**
*Element, type=CONN3D2
1, BRIDGE_1.359, BRIDGE_2.359
*Connector Section, elset=_PickedSet12, behavior=ConnProp-1_CONNECTION_BEHAVIOR
Slot, Rotation
CONNECTION_ORIENTATION,
*Nset, nset=ACCELEROMETERS_1, instance=BRIDGE_1
  740,  905, 1178, 1181, 1183, 1185, 1187, 1189, 1193, 1196, 1198, 1200, 1202, 1204, 1205, 1206
*Nset, nset=ACCELEROMETERS_2, instance=BRIDGE_2, generate
 1163,  1166,     1
*Nset, nset=SUPPORT_CABLE_ANCHOR, instance=BRIDGE_1, generate
 1163,  1174,     1
*Nset, nset=SUPPORT_COLUMN_3, instance=BRIDGE_2
 978,
*Nset, nset=SUPPORT_COLUMN_4, instance=BRIDGE_2
 1028,
*Nset, nset=SUPPORT_COLUMN_5, instance=BRIDGE_2
 1078,
*Nset, nset=SUPPORT_COLUMN_6, instance=BRIDGE_2
 1118,
*Nset, nset=SUPPORT_COLUMN_7, instance=BRIDGE_2
 1145,
*Nset, nset=SUPPORT_MAIN_TOWER, instance=BRIDGE_1
 610, 775
*Nset, nset=SUPPORT_NODES_NORTH, instance=BRIDGE_1
 1,
*Nset, nset=SUPPORT_NODES_SOUTH, instance=BRIDGE_2
 609,
*Elset, elset=_PickedSet12, internal
 1,
*Orientation, name=CONNECTION_ORIENTATION
          1.,           0.,           0.,           0.,           1.,           0.
1, 0.
*End Assembly
*Connector Behavior, name=ConnProp-1_CONNECTION_BEHAVIOR
*Connector Elasticity, component=4
1.,
*Connector Elasticity, component=5
2.,
*Connector Elasticity, component=6
3.,
**
** MATERIALS
**
*Material, name=B45
*Density
2500.,
*Elastic
 2.7e+10, 0.2
*Material, name=CABLE
*Density
7850.,
*Elastic
 1.6e+11, 0.3
*Material, name=DUMMY_SECTION
*Density
*Elastic
 0.1,0.
*Material, name=S355
*Density
7850.,
*Elastic
 2.1e+11, 0.3
** ----------------------------------------------------------------
**
** STEP: Static
**
*Step, name=Static, nlgeom=NO
Static analysis
*Static
1., 1., 1e-05, 1.
**
** BOUNDARY CONDITIONS
**
** Name: Disp-BC-1 Type: Displacement/Rotation
*Boundary
SUPPORT_NODES_SOUTH, 1, 1
SUPPORT_NODES_SOUTH, 2, 2
SUPPORT_NODES_SOUTH, 3, 3
** Name: Disp-BC-2 Type: Displacement/Rotation
*Boundary
SUPPORT_NODES_NORTH, 1, 1
SUPPORT_NODES_NORTH, 2, 2
SUPPORT_NODES_NORTH, 3, 3
SUPPORT_NODES_NORTH, 4, 4
SUPPORT_NODES_NORTH, 5, 5
SUPPORT_NODES_NORTH, 6, 6
** Name: Disp-BC-3 Type: Displacement/Rotation
*Boundary
SUPPORT_MAIN_TOWER, 1, 1
SUPPORT_MAIN_TOWER, 2, 2
SUPPORT_MAIN_TOWER, 3, 3
SUPPORT_MAIN_TOWER, 4, 4
SUPPORT_MAIN_TOWER, 5, 5
SUPPORT_MAIN_TOWER, 6, 6
** Name: Disp-BC-4 Type: Displacement/Rotation
*Boundary
SUPPORT_COLUMN_3, 1, 1
SUPPORT_COLUMN_3, 2, 2
SUPPORT_COLUMN_3, 3, 3
SUPPORT_COLUMN_3, 4, 4
SUPPORT_COLUMN_3, 5, 5
SUPPORT_COLUMN_3, 6, 6
** Name: Disp-BC-5 Type: Displacement/Rotation
*Boundary
SUPPORT_COLUMN_4, 1, 1
SUPPORT_COLUMN_4, 2, 2
SUPPORT_COLUMN_4, 3, 3
SUPPORT_COLUMN_4, 4, 4
SUPPORT_COLUMN_4, 5, 5
SUPPORT_COLUMN_4, 6, 6
** Name: Disp-BC-6 Type: Displacement/Rotation
*Boundary
SUPPORT_COLUMN_5, 1, 1
SUPPORT_COLUMN_5, 2, 2
SUPPORT_COLUMN_5, 3, 3
SUPPORT_COLUMN_5, 4, 4
SUPPORT_COLUMN_5, 5, 5
SUPPORT_COLUMN_5, 6, 6
** Name: Disp-BC-7 Type: Displacement/Rotation
*Boundary
SUPPORT_COLUMN_6, 1, 1
SUPPORT_COLUMN_6, 2, 2
SUPPORT_COLUMN_6, 3, 3
SUPPORT_COLUMN_6, 4, 4
SUPPORT_COLUMN_6, 5, 5
SUPPORT_COLUMN_6, 6, 6
** Name: Disp-BC-8 Type: Displacement/Rotation
*Boundary
SUPPORT_COLUMN_7, 1, 1
SUPPORT_COLUMN_7, 2, 2
SUPPORT_COLUMN_7, 3, 3
SUPPORT_COLUMN_7, 4, 4
SUPPORT_COLUMN_7, 5, 5
SUPPORT_COLUMN_7, 6, 6
** Name: Disp-BC-9 Type: Displacement/Rotation
*Boundary
SUPPORT_CABLE_ANCHOR, 1, 1
SUPPORT_CABLE_ANCHOR, 2, 2
SUPPORT_CABLE_ANCHOR, 3, 3
**
** LOADS
**
** Name: GRAVITY-1   Type: Gravity
*Dload
, GRAV, 9.81, 0., 0., -1.
**
** OUTPUT REQUESTS
**
*Restart, write, frequency=0
**
** FIELD OUTPUT: F-Output-1
**
*Output, field
*Node Output
RF, U, UR
**
** FIELD OUTPUT: F-Output-2
**
*Element Output, directions=YES
SF,
*Output, history, frequency=0
*End Step
** ----------------------------------------------------------------
**
** STEP: Modal
**
*Step, name=Modal, nlgeom=NO, perturbation
Modal analysis
*Frequency, eigensolver=Lanczos, sim, acoustic coupling=on, normalization=mass
86, , , , ,
**
** OUTPUT REQUESTS
**
*Restart, write, frequency=0
**
** FIELD OUTPUT: F-Output-3
**
*Output, field
*Node Output
U, UR
*End Step
